x := 0, 1 .. 99 = [
    0; 1; 2; 3; 4; 5; 6; 7; 8; 9
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]
SINA := (sin(2*π*x/99) + 1)*50
SINB := (sin(2*π*x/99 - 120*π/180) + 1)*50
SINC := (sin(2*π*x/99 + 120*π/180) + 1)*50
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SINA = [
    50; 53.1712; 56.3296; 59.4626; 62.5574; 65.6017; 68.5831; 71.4897; 74.3098; 77.032
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]
SINB = [
    6.69873; 5.20031; 3.88229; 2.74996; 1.80789; 1.05988; 0.508928; 0.157261; 0.00629362; 0.056633
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]
SINC = [
    93.3013; 91.6285; 89.7881; 87.7875; 85.6347; 83.3385; 80.9079; 78.353; 75.6839; 72.9113
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]
