x := 0, 1 .. 99 = [
    0; 1; 2; 3; 4; 5; 6; 7; 8; 9
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]
SINA := (1.13*sin(2*π*x/99) + 1)*50 + 1/4*((1.13*sin(3*2*π*x/99) + 1)*50)
SINB := (1.13*sin(2*π*x/99 - 120*π/180) + 1)*50 + 1/4*((1.13*sin(3*2*π*x/99 - 3*120*π/180) + 1)*50)
SINC := (1.13*sin(2*π*x/99 + 120*π/180) + 1)*50 + 1/4*((1.13*sin(3*2*π*x/99 + 3*120*π/180) + 1)*50)
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SINA - 12.7 = [
    49.8; 56.0566; 62.2022; 68.1292; 73.7372; 78.9358; 83.6475; 87.8103; 91.3791; 94.3274
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]
SINB - 12.7 = [
    0.869565; 1.84953; 2.93671; 4.04401; 5.09028; 6.00355; 6.72364; 7.20454; 7.41611; 7.34522
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]
SINC - 12.7 = [
    98.7304; 99.5134; 100.01; 100.136; 99.8146; 98.9783; 97.5745; 95.5657; 92.9318; 89.671
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]
Umin := min(SINA, SINB, SINC)
Umax := max(SINA, SINB, SINC)
Ua := 2/sqrt(3)*(SINA + (Umin + Umax)/2)
Ub := 2/sqrt(3)*(SINB + (Umin + Umax)/2)
Uc := 2/sqrt(3)*(SINC + (Umin + Umax)/2)
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