x := 0, 1 .. 49 = [
    0; 1; 2; 3; 4; 5; 6; 7; 8; 9
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]
SINA := (sin(2*π*x/50) + 1)*49
SINB := (sin(2*π*x/50 - 120*π/180) + 1)*49
SINC := (sin(2*π*x/50 + 120*π/180) + 1)*49
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SINA = [
    49; 55.1413; 61.1858; 67.0381; 72.6059; 77.8015; 82.5428; 86.7551; 90.3721; 93.3365
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]
