# Синус разложение в ряд Маклорена
x := 0
x - x^3/(1*2*3) + x^5/(1*2*3*4*5) - x^7/(1*2*3*4*5*6*7) = 0
x*(5040 - x^2*(840 - x^2*(42 - x^2)))/5040 = 0
(10*x - 1.667*x^3 + 0.083*x^5 - 0.001984*x^7)/10 = 0
sin(2.2981239613) = 0.746954
# Косинус разложение в ряд Тейлора
1 - x^2/(1*2) + x^4/(1*2*3*4) - x^6/(1*2*3*4*5*6) + x^8/(1*2*3*4*5*6*7*8) = 1
cos(2.2981239613) = -0.664876
(100 - 50*x^2 + 4.167*x^4 - 0.139*x^6 + 2.48*10^-3*x^8)/100 = 1
